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/batch
! ANSYS input file written by Workbench version 2021 R1
! File used for geometry attach: D:\DU LIEU E\Tai Lieu Hoc Tap\Chuyên Ngành\CAO HOC\FATIGUE\FATIGUE\PROBLEM_files\dp0\SYS-1\DM\SYS-1.agdb
/title,PROBLEM--Static Structural (B5)
/com,--- Data in consistent NMM units. See Solving Units in the help system for more information.
/units,MPA
/prep7
! Turn off shape checking because checks already performed inside WB mesher.
! See help system for more information.
SHPP,OFF,,NOWARN
etcon,set             ! allow ANSYS to choose best KEYOP's for 180x elements, resets any applicable keyopt to MAPDL defaults
/com,*********** Nodes for the whole assembly ***********
nblock,3,,17851
(1i9,3e20.9e3)
        1     1.356416843E+02     3.631714070E+02     0.000000000E+00
        2     1.356416843E+02     8.317140696E+01     0.000000000E+00
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-1
/com,*********** Nodes for all Remote Points ***********
nblock,3
(1i9,3e20.9e3)
    16230     2.456416730E+02     4.531714022E+02     0.000000000E+00
    16231     2.456416730E+02     1.317140739E+01     0.000000000E+00
    16232     5.456416607E+02     2.331714048E+02     0.000000000E+00
-1
/com,*********** Elements for Body 1 "Surface Body" ***********
et,1,181
keyo,1,3,2
eblock,19,solid,,15747
(19i9)
        1        1        1        1        0        0        0        0        4        0        1    14696    14697    11079    11079
        1        1        1        1        0        0        0        0        4        0        2    14699    14700    11332    11332
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-1
/com,*********** Send User Defined Coordinate System(s) ***********
csys,0
toffst,273.15,  ! Temperature offset from absolute zero
/com,*********** Set Reference Temperature ***********
tref,22.
/com,*********** Send Materials ***********
Temperature = 'TEMP' ! Temperature
MP,DENS,1,7.85e-09,	! tonne mm^-3
MP,ALPX,1,1.2e-05,	! C^-1
MP,C,1,434000000,	! mm^2 s^-2 C^-1
MP,KXX,1,60.5,	! tonne mm s^-3 C^-1
MP,RSVX,1,0.00017,	! ohm mm
MP,EX,1,200000,	! tonne s^-2 mm^-1
MP,NUXY,1,0.3,
MP,MURX,1,10000,

/com,*********** Send Sheet Properties ***********
sectype,1,shell
secdata,7.
secoff,mid

!************************* Model Summary ********************
!Surface Body,	Structural Steel,	matid,	1
!************************* End Model Summary ********************
/com,*********** Fixed Supports ***********
CMBLOCK,_FIXEDSU,NODE,       89
(8i10)
      9151      9152      9153      9154      9155      9156      9157      9158
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cmsel,s,_FIXEDSU
d,all,all
nsel,all
/com,*********** Create Remote Point "Internal Remote Point" ***********
! -------- Remote Point Used by "Remote Displacement" --------
*set,tid,3
*set,cid,2
et,cid,175
et,tid,170
keyo,tid,2,1               ! Don't fix the pilot node
keyo,tid,4,111111
keyo,cid,12,5              ! Bonded Contact
keyo,cid,4,1               ! Deformable RBE3 style load
keyo,cid,2,2               ! MPC style contact
! growing edge scoping into the face since scoped to a straight edge
mat,2
real,2
type,2
en,15751,9152
en,15752,9239
en,15753,9360
en,15754,9361
en,15755,9448
en,15756,9449
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en,15992,15526
*set,_npilot,16230
_npilot46=_npilot
type,tid
mat ,cid
real,cid
tshape,pilo
en,15993,_npilot
tshape
/com,*********** Create Remote Point "Internal Remote Point 2" ***********
! -------- Remote Point Used by "Remote Displacement 2" --------
*set,tid,5
*set,cid,4
et,cid,175
et,tid,170
keyo,tid,2,1               ! Don't fix the pilot node
keyo,tid,4,111111
keyo,cid,12,5              ! Bonded Contact
keyo,cid,4,1               ! Deformable RBE3 style load
keyo,cid,2,2               ! MPC style contact
! growing edge scoping into the face since scoped to a straight edge
mat,4
real,4
type,4
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en,16235,15733
*set,_npilot,16231
_npilot49=_npilot
type,tid
mat ,cid
real,cid
tshape,pilo
en,16236,_npilot
tshape
/com,*********** Create Remote Point "Internal Remote Point 3" ***********
! -------- Remote Point Used by "Remote Displacement 3" --------
*set,tid,7
*set,cid,6
et,cid,175
et,tid,170
keyo,tid,2,1               ! Don't fix the pilot node
keyo,tid,4,111111
keyo,cid,12,5              ! Bonded Contact
keyo,cid,4,1               ! Deformable RBE3 style load
keyo,cid,2,2               ! MPC style contact
! growing edge scoping into the face since scoped to a straight edge
mat,6
real,6
type,6
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en,16414,15323
*set,_npilot,16232
_npilot55=_npilot
type,tid
mat ,cid
real,cid
tshape,pilo
en,16415,_npilot
tshape
/com,*********** Define Force Using Surface Effect Elements ***********
local,12,0,0.,0.,0.,0.,0.,0.
csys,0
et,8,156
keyop,8,5,1         !  No orientation node
eblock,10,,,88
(15i9)
    16416        8        8        8       12     9361     9360
    16417        8        8        8       12     9362     9361
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-1
esel,s,type,,8
keyop,8,2,1                ! Apply load in local coordinate system
keyop,8,7,1                ! Use original area so load is constant in large deformation
esel,all
/com,*********** Define Force Using Surface Effect Elements ***********
local,13,0,0.,0.,0.,0.,0.,0.
csys,0
et,9,156
keyop,9,5,1         !  No orientation node
eblock,10,,,120
(15i9)
    16504        9        9        9       13     9449     9448
    16505        9        9        9       13     9450     9449
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-1
esel,s,type,,9
keyop,9,2,1                ! Apply load in local coordinate system
keyop,9,7,1                ! Use original area so load is constant in large deformation
esel,all
/com,*********** Construct Remote Displacement ***********
/com,*********** Construct Remote Displacement ***********
/com,*********** Construct Remote Displacement ***********

/COM,*** Create a component for all remote displacements ***
CMBLOCK,REMOTEDISPALL,NODE,        3
(8i10)
     16230     16231     16232

fini
/com,****************************************************************************
/com,*************************    SOLUTION       ********************************
/com,****************************************************************************
/solu
antype,0                   ! static analysis
_thickRatio=  0     ! Ratio of thick parts in the model
eqsl,sparse,,,,,1
cntr,print,1               ! print out contact info and also make no initial contact an error
dmpoption,emat,no             ! Don't combine emat file for DANSYS
dmpoption,esav,no             ! Don't combine esav file for DANSYS
nldiag,cont,iter           ! print out contact info each equilibrium iteration
rescontrol,,none                 ! Do not keep any restart files
/com,****************************************************
/com,******************* SOLVE FOR LS 1 OF 1 ****************
esel,s,type,,8
nsle
sfe,all,1,pres,1,90.9090909090909
sfe,all,2,pres,1,0.
sfe,all,3,pres,1,0.
esel,s,type,,9
nsle
sfe,all,1,pres,1,0.
sfe,all,2,pres,1,-66.6666666666667
sfe,all,3,pres,1,0.
nsel,all
esel,all
d,16230,ux,0.
d,16230,roty,0.
d,16230,rotz,0.
d,16231,ux,0.
d,16231,roty,0.
d,16231,rotz,0.
d,16232,uy,0.
nsub,1,1,1
time,1.
outres,erase
outres,all,none
outres,nsol,all,
outres,rsol,all
outres,eangl,all
outres,etmp,all
outres,veng,all
outres,strs,all,
outres,epel,all,
outres,eppl,all,
outres,cont,all,
! *********** WB SOLVE COMMAND ***********
! check interactive state
*get,ANSINTER_,active,,int
*if,ANSINTER_,ne,0,then
/eof
*endif
solve
/com *************** Write FE CONNECTORS *********
CEWRITE,file,ce,,INTE
/com,****************************************************
/com,*************** FINISHED SOLVE FOR LS 1 *************
/post1
fini
