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/batch
! ANSYS input file written by Workbench version 2021 R1
! File used for geometry attach: C:\Users\ADMIN\Documents\GitHub\Fatigue\DOCUMENT\MODEL\FAT_files\dp0\SYS\DM\SYS.agdb
/title,FAT--Static Structural (A5)
/com,--- Data in consistent NMM units. See Solving Units in the help system for more information.
/units,MPA
/prep7
! Turn off shape checking because checks already performed inside WB mesher.
! See help system for more information.
SHPP,OFF,,NOWARN
etcon,set             ! allow ANSYS to choose best KEYOP's for 180x elements, resets any applicable keyopt to MAPDL defaults
/com,*********** Nodes for the whole assembly ***********
nblock,3,,15777
(1i9,3e20.9e3)
        1     3.324000000E+03     3.000000000E+02     6.150000000E+02
        2     3.324000000E+03     3.000000000E+02     6.200000000E+02
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-1
/com,*********** Elements for Body 1 "Surface Body" ***********
et,1,181
keyo,1,3,2
eblock,19,solid,,3395
(19i9)
        1        1        1        1        0        0        0        0        4        0      257    11688    11736    13513    11684
        1        1        1        1        0        0        0        0        4        0      258    11684    11810    11809    11688
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-1
/com,*********** Elements for Body 2 "Surface Body" ***********
et,2,181
keyo,2,3,2
eblock,19,solid,,3360
(19i9)
        2        2        2        2        0        0        0        0        4        0     3652     8267     8266     8265     8264
        2        2        2        2        0        0        0        0        4        0     3653     8264     8497     8496     8267
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-1
/com,*********** Elements for Body 3 "Solid" ***********
et,3,186
keyo,3,2,1          ! set full integration on SOLID186
eblock,19,solid,,20
(19i9)
        3        3        1        3        0        0        0        0       20        0        1       27       37       56       56       28       38       55       55
      243      272       56      244      246      274       55      247      242      271      298      298
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-1
/com,*********** Elements for Body 4 "Solid" ***********
et,4,186
keyo,4,2,1          ! set full integration on SOLID186
eblock,19,solid,,20
(19i9)
        4        4        1        4        0        0        0        0       20        0       21       57       96       67       67       58       87       68       68
      301      330       67      300      304      333       68      303      299      377      328      328
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-1
/com,*********** Elements for Body 5 "Solid" ***********
et,5,186
keyo,5,2,1          ! set full integration on SOLID186
eblock,19,solid,,20
(19i9)
        5        5        1        5        0        0        0        0       20        0       41      107      117      136      136      108      118      135      135
      415      444      136      416      418      446      135      419      414      443      470      470
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-1
/com,*********** Elements for Body 6 "Solid" ***********
et,6,186
keyo,6,2,1          ! set full integration on SOLID186
eblock,19,solid,,20
(19i9)
        6        6        1        6        0        0        0        0       20        0       61      137      176      147      147      138      167      148      148
      473      502      147      472      476      505      148      475      471      549      500      500
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-1
/com,*********** Elements for Body 7 "Surface Body" ***********
et,7,181
keyo,7,3,2
eblock,19,solid,,1350
(19i9)
        7        7        7        7        0        0        0        0        4        0     7012     1480     1481     7846     7846
        7        7        7        7        0        0        0        0        4        0     7013     7242     7358     7243     7243
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-1
/com,*********** Elements for Body 8 "Surface Body" ***********
et,8,181
keyo,8,3,2
eblock,19,solid,,1367
(19i9)
        8        8        8        8        0        0        0        0        4        0     8362     1587     1588     6591     6591
        8        8        8        8        0        0        0        0        4        0     8363     5832     5821     5833     5833
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-1
/com,*********** Elements for Body 9 "Surface Body" ***********
et,9,181
keyo,9,3,2
eblock,19,solid,,544
(19i9)
        9        9        9        9        0        0        0        0        4        0     9729     1676     1483     1554     1554
        9        9        9        9        0        0        0        0        4        0     9730     1678     5693     1676     1676
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-1
/com,*********** Elements for Body 10 "Surface Body" ***********
et,10,181
keyo,10,3,2
eblock,19,solid,,540
(19i9)
       10       10       10       10        0        0        0        0        4        0    10273     1860     1590     1661     1661
       10       10       10       10        0        0        0        0        4        0    10274     5399     5398     5262     5262
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-1
/com,*********** Elements for Body 11 "Surface Body" ***********
et,11,181
keyo,11,3,2
eblock,19,solid,,966
(19i9)
       11       11       11       11        0        0        0        0        4        0    10813     4850     4641     4679     4679
       11       11       11       11        0        0        0        0        4        0    10814     4683     4643     4846     4846
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-1
/com,*********** Elements for Body 12 "Surface Body" ***********
et,12,181
keyo,12,3,2
eblock,19,solid,,432
(19i9)
       12       12       12       12        0        0        0        0        4        0    11779     2203     2272     3982     3982
       12       12       12       12        0        0        0        0        4        0    11780     1676     1678     4186     4186
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-1
/com,*********** Elements for Body 13 "Surface Body" ***********
et,13,181
keyo,13,3,2
eblock,19,solid,,426
(19i9)
       13       13       13       13        0        0        0        0        4        0    12211     2344     2413     3701     3701
       13       13       13       13        0        0        0        0        4        0    12212     1860     3902     1590     1590
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-1
/com,*********** Elements for Body 14 "Surface Body" ***********
et,14,181
keyo,14,3,2
eblock,19,solid,,974
(19i9)
       14       14       14       14        0        0        0        0        4        0    12637     2852     2950     3607     3607
       14       14       14       14        0        0        0        0        4        0    12638     2800     2801     3580     3580
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-1
/com,*********** Elements for Body 15 "Surface Body" ***********
et,15,181
keyo,15,3,2
eblock,19,solid,,48
(19i9)
       15       15       15       15        0        0        0        0        4        0    13611     2732     2746     2733     2733
       15       15       15       15        0        0        0        0        4        0    13612     2741     2740     2736     2742
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-1
/com,*********** Elements for Body 16 "Surface Body" ***********
et,16,181
keyo,16,3,2
eblock,19,solid,,52
(19i9)
       16       16       16       16        0        0        0        0        4        0    13659     2699     2726     2727     2727
       16       16       16       16        0        0        0        0        4        0    13660     2563     2564     2566     2567
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-1
/com,*********** Elements for Body 17 "Surface Body" ***********
et,17,181
keyo,17,3,2
eblock,19,solid,,49
(19i9)
       17       17       17       17        0        0        0        0        4        0    13711     2696     2668     2695     2695
       17       17       17       17        0        0        0        0        4        0    13712     2681     2669     2682     2682
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-1
/com,*********** Elements for Body 18 "Surface Body" ***********
et,18,181
keyo,18,3,2
eblock,19,solid,,52
(19i9)
       18       18       18       18        0        0        0        0        4        0    13760     2630     2662     2629     2629
       18       18       18       18        0        0        0        0        4        0    13761     2640     2639     2657     2655
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-1
/com,*********** Send User Defined Coordinate System(s) ***********
csys,0
toffst,273.15,  ! Temperature offset from absolute zero
/com,*********** Set Reference Temperature ***********
tref,22.
/com,*********** Send Materials ***********
Temperature = 'TEMP' ! Temperature
MP,DENS,1,7.85e-09,	! tonne mm^-3
MP,ALPX,1,1.2e-05,	! C^-1
MP,C,1,434000000,	! mm^2 s^-2 C^-1
MP,KXX,1,60.5,	! tonne mm s^-3 C^-1
MP,RSVX,1,0.00017,	! ohm mm
MP,EX,1,200000,	! tonne s^-2 mm^-1
MP,NUXY,1,0.3,
MP,MURX,1,10000,

Temperature = 'TEMP' ! Temperature
MP,DENS,2,7.85e-09,	! tonne mm^-3
MP,ALPX,2,1.2e-05,	! C^-1
MP,C,2,434000000,	! mm^2 s^-2 C^-1
MP,KXX,2,60.5,	! tonne mm s^-3 C^-1
MP,RSVX,2,0.00017,	! ohm mm
MP,EX,2,200000,	! tonne s^-2 mm^-1
MP,NUXY,2,0.3,
MP,MURX,2,10000,

Temperature = 'TEMP' ! Temperature
MP,DENS,3,7.85e-09,	! tonne mm^-3
MP,ALPX,3,1.2e-05,	! C^-1
MP,C,3,434000000,	! mm^2 s^-2 C^-1
MP,KXX,3,60.5,	! tonne mm s^-3 C^-1
MP,RSVX,3,0.00017,	! ohm mm
MP,EX,3,200000,	! tonne s^-2 mm^-1
MP,NUXY,3,0.3,
MP,MURX,3,10000,

Temperature = 'TEMP' ! Temperature
MP,DENS,4,7.85e-09,	! tonne mm^-3
MP,ALPX,4,1.2e-05,	! C^-1
MP,C,4,434000000,	! mm^2 s^-2 C^-1
MP,KXX,4,60.5,	! tonne mm s^-3 C^-1
MP,RSVX,4,0.00017,	! ohm mm
MP,EX,4,200000,	! tonne s^-2 mm^-1
MP,NUXY,4,0.3,
MP,MURX,4,10000,

Temperature = 'TEMP' ! Temperature
MP,DENS,5,7.85e-09,	! tonne mm^-3
MP,ALPX,5,1.2e-05,	! C^-1
MP,C,5,434000000,	! mm^2 s^-2 C^-1
MP,KXX,5,60.5,	! tonne mm s^-3 C^-1
MP,RSVX,5,0.00017,	! ohm mm
MP,EX,5,200000,	! tonne s^-2 mm^-1
MP,NUXY,5,0.3,
MP,MURX,5,10000,

Temperature = 'TEMP' ! Temperature
MP,DENS,6,7.85e-09,	! tonne mm^-3
MP,ALPX,6,1.2e-05,	! C^-1
MP,C,6,434000000,	! mm^2 s^-2 C^-1
MP,KXX,6,60.5,	! tonne mm s^-3 C^-1
MP,RSVX,6,0.00017,	! ohm mm
MP,EX,6,200000,	! tonne s^-2 mm^-1
MP,NUXY,6,0.3,
MP,MURX,6,10000,

Temperature = 'TEMP' ! Temperature
MP,DENS,7,7.85e-09,	! tonne mm^-3
MP,ALPX,7,1.2e-05,	! C^-1
MP,C,7,434000000,	! mm^2 s^-2 C^-1
MP,KXX,7,60.5,	! tonne mm s^-3 C^-1
MP,RSVX,7,0.00017,	! ohm mm
MP,EX,7,200000,	! tonne s^-2 mm^-1
MP,NUXY,7,0.3,
MP,MURX,7,10000,

Temperature = 'TEMP' ! Temperature
MP,DENS,8,7.85e-09,	! tonne mm^-3
MP,ALPX,8,1.2e-05,	! C^-1
MP,C,8,434000000,	! mm^2 s^-2 C^-1
MP,KXX,8,60.5,	! tonne mm s^-3 C^-1
MP,RSVX,8,0.00017,	! ohm mm
MP,EX,8,200000,	! tonne s^-2 mm^-1
MP,NUXY,8,0.3,
MP,MURX,8,10000,

Temperature = 'TEMP' ! Temperature
MP,DENS,9,7.85e-09,	! tonne mm^-3
MP,ALPX,9,1.2e-05,	! C^-1
MP,C,9,434000000,	! mm^2 s^-2 C^-1
MP,KXX,9,60.5,	! tonne mm s^-3 C^-1
MP,RSVX,9,0.00017,	! ohm mm
MP,EX,9,200000,	! tonne s^-2 mm^-1
MP,NUXY,9,0.3,
MP,MURX,9,10000,

Temperature = 'TEMP' ! Temperature
MP,DENS,10,7.85e-09,	! tonne mm^-3
MP,ALPX,10,1.2e-05,	! C^-1
MP,C,10,434000000,	! mm^2 s^-2 C^-1
MP,KXX,10,60.5,	! tonne mm s^-3 C^-1
MP,RSVX,10,0.00017,	! ohm mm
MP,EX,10,200000,	! tonne s^-2 mm^-1
MP,NUXY,10,0.3,
MP,MURX,10,10000,

Temperature = 'TEMP' ! Temperature
MP,DENS,11,7.85e-09,	! tonne mm^-3
MP,ALPX,11,1.2e-05,	! C^-1
MP,C,11,434000000,	! mm^2 s^-2 C^-1
MP,KXX,11,60.5,	! tonne mm s^-3 C^-1
MP,RSVX,11,0.00017,	! ohm mm
MP,EX,11,200000,	! tonne s^-2 mm^-1
MP,NUXY,11,0.3,
MP,MURX,11,10000,

Temperature = 'TEMP' ! Temperature
MP,DENS,12,7.85e-09,	! tonne mm^-3
MP,ALPX,12,1.2e-05,	! C^-1
MP,C,12,434000000,	! mm^2 s^-2 C^-1
MP,KXX,12,60.5,	! tonne mm s^-3 C^-1
MP,RSVX,12,0.00017,	! ohm mm
MP,EX,12,200000,	! tonne s^-2 mm^-1
MP,NUXY,12,0.3,
MP,MURX,12,10000,

Temperature = 'TEMP' ! Temperature
MP,DENS,13,7.85e-09,	! tonne mm^-3
MP,ALPX,13,1.2e-05,	! C^-1
MP,C,13,434000000,	! mm^2 s^-2 C^-1
MP,KXX,13,60.5,	! tonne mm s^-3 C^-1
MP,RSVX,13,0.00017,	! ohm mm
MP,EX,13,200000,	! tonne s^-2 mm^-1
MP,NUXY,13,0.3,
MP,MURX,13,10000,

Temperature = 'TEMP' ! Temperature
MP,DENS,14,7.85e-09,	! tonne mm^-3
MP,ALPX,14,1.2e-05,	! C^-1
MP,C,14,434000000,	! mm^2 s^-2 C^-1
MP,KXX,14,60.5,	! tonne mm s^-3 C^-1
MP,RSVX,14,0.00017,	! ohm mm
MP,EX,14,200000,	! tonne s^-2 mm^-1
MP,NUXY,14,0.3,
MP,MURX,14,10000,

Temperature = 'TEMP' ! Temperature
MP,DENS,15,7.85e-09,	! tonne mm^-3
MP,ALPX,15,1.2e-05,	! C^-1
MP,C,15,434000000,	! mm^2 s^-2 C^-1
MP,KXX,15,60.5,	! tonne mm s^-3 C^-1
MP,RSVX,15,0.00017,	! ohm mm
MP,EX,15,200000,	! tonne s^-2 mm^-1
MP,NUXY,15,0.3,
MP,MURX,15,10000,

Temperature = 'TEMP' ! Temperature
MP,DENS,16,7.85e-09,	! tonne mm^-3
MP,ALPX,16,1.2e-05,	! C^-1
MP,C,16,434000000,	! mm^2 s^-2 C^-1
MP,KXX,16,60.5,	! tonne mm s^-3 C^-1
MP,RSVX,16,0.00017,	! ohm mm
MP,EX,16,200000,	! tonne s^-2 mm^-1
MP,NUXY,16,0.3,
MP,MURX,16,10000,

Temperature = 'TEMP' ! Temperature
MP,DENS,17,7.85e-09,	! tonne mm^-3
MP,ALPX,17,1.2e-05,	! C^-1
MP,C,17,434000000,	! mm^2 s^-2 C^-1
MP,KXX,17,60.5,	! tonne mm s^-3 C^-1
MP,RSVX,17,0.00017,	! ohm mm
MP,EX,17,200000,	! tonne s^-2 mm^-1
MP,NUXY,17,0.3,
MP,MURX,17,10000,

Temperature = 'TEMP' ! Temperature
MP,DENS,18,7.85e-09,	! tonne mm^-3
MP,ALPX,18,1.2e-05,	! C^-1
MP,C,18,434000000,	! mm^2 s^-2 C^-1
MP,KXX,18,60.5,	! tonne mm s^-3 C^-1
MP,RSVX,18,0.00017,	! ohm mm
MP,EX,18,200000,	! tonne s^-2 mm^-1
MP,NUXY,18,0.3,
MP,MURX,18,10000,

/com,*********** Send Sheet Properties ***********
sectype,1,shell
secdata,11.5
secoff,mid

sectype,2,shell
secdata,11.5
secoff,mid

sectype,7,shell
secdata,10.
secoff,mid

sectype,8,shell
secdata,10.
secoff,mid

sectype,9,shell
secdata,20.
secoff,mid

sectype,10,shell
secdata,20.
secoff,mid

sectype,11,shell
secdata,10.
secoff,mid

sectype,12,shell
secdata,20.
secoff,mid

sectype,13,shell
secdata,20.
secoff,mid

sectype,14,shell
secdata,10.
secoff,mid

sectype,15,shell
secdata,20.
secoff,mid

sectype,16,shell
secdata,20.
secoff,mid

sectype,17,shell
secdata,20.
secoff,mid

sectype,18,shell
secdata,20.
secoff,mid

!************************* Model Summary ********************
!Surface Body,	Structural Steel,	matid,	1
!Surface Body,	Structural Steel,	matid,	2
!Solid,	Structural Steel,	matid,	3
!Solid,	Structural Steel,	matid,	4
!Solid,	Structural Steel,	matid,	5
!Solid,	Structural Steel,	matid,	6
!Surface Body,	Structural Steel,	matid,	7
!Surface Body,	Structural Steel,	matid,	8
!Surface Body,	Structural Steel,	matid,	9
!Surface Body,	Structural Steel,	matid,	10
!Surface Body,	Structural Steel,	matid,	11
!Surface Body,	Structural Steel,	matid,	12
!Surface Body,	Structural Steel,	matid,	13
!Surface Body,	Structural Steel,	matid,	14
!Surface Body,	Structural Steel,	matid,	15
!Surface Body,	Structural Steel,	matid,	16
!Surface Body,	Structural Steel,	matid,	17
!Surface Body,	Structural Steel,	matid,	18
!************************* End Model Summary ********************
/com,*********** Create Contact "Bonded - Multiple To Surface Body" ***********
*set,tid,20
*set,cid,19
r,tid
r,cid
et,tid,170
et,cid,175
mat,19
real,19
type,19
en,13812,1676
en,13813,1677
en,13814,1678
en,13815,1679
en,13816,1680
en,13817,1681
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en,13823,1858
eblock,10,,,544
(15i9)
    13824       20       19       20        0     1676     1483     1554     1554
    13825       20       19       20        0     1678     5693     1676     1676
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-1
keyo,cid,10,0              ! adjust contact stiffness each NR iteration (from Program Controlled setting)
keyo,cid,12,5              ! bonded always
keyo,cid,18,1              ! small sliding turned on by application
keyo,cid,2,0               ! augmented Lagrange (from Program Controlled setting)
keyo,tid,5,2               ! Constrain both translation and rotation
keyo,cid,9,1               ! ignore initial gaps/penetration
keyo,cid,7,0               ! No Prediction
rmod,cid,3,10.      ! FKN
rmod,cid,5,0.       ! ICONT
rmod,cid,6,1.       ! PINB
rmod,cid,10,0.      ! CNOF
rmod,cid,12,0.      ! FKT
rmod,cid,36,156     ! WB DSID
/com,*********** Create Contact "Bonded - Multiple To Surface Body" ***********
*set,tid,22
*set,cid,21
r,tid
r,cid
et,tid,170
et,cid,175
mat,21
real,21
type,21
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en,14379,2042
eblock,10,,,540
(15i9)
    14380       22       21       22        0     1860     1590     1661     1661
    14381       22       21       22        0     5399     5398     5262     5262
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-1
keyo,cid,10,0              ! adjust contact stiffness each NR iteration (from Program Controlled setting)
keyo,cid,12,5              ! bonded always
keyo,cid,18,1              ! small sliding turned on by application
keyo,cid,2,0               ! augmented Lagrange (from Program Controlled setting)
keyo,tid,5,2               ! Constrain both translation and rotation
keyo,cid,9,1               ! ignore initial gaps/penetration
keyo,cid,7,0               ! No Prediction
rmod,cid,3,10.      ! FKN
rmod,cid,5,0.       ! ICONT
rmod,cid,6,1.       ! PINB
rmod,cid,10,0.      ! CNOF
rmod,cid,12,0.      ! FKT
rmod,cid,36,159     ! WB DSID
/com,*********** Create Contact "Bonded - Multiple To Surface Body" ***********
*set,tid,24
*set,cid,23
r,tid
r,cid
et,tid,170
et,cid,175
mat,23
real,23
type,23
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en,14931,1858
eblock,10,,,544
(15i9)
    14932       24       23       24        0     1483     1676     1554     1554
    14933       24       23       24        0     5693     1678     1676     1676
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-1
keyo,cid,10,0              ! adjust contact stiffness each NR iteration (from Program Controlled setting)
keyo,cid,12,5              ! bonded always
keyo,cid,18,1              ! small sliding turned on by application
keyo,cid,2,0               ! augmented Lagrange (from Program Controlled setting)
keyo,tid,5,2               ! Constrain both translation and rotation
keyo,cid,9,1               ! ignore initial gaps/penetration
keyo,cid,7,0               ! No Prediction
rmod,cid,3,10.      ! FKN
rmod,cid,5,0.       ! ICONT
rmod,cid,6,1.       ! PINB
rmod,cid,10,0.      ! CNOF
rmod,cid,12,0.      ! FKT
rmod,cid,36,173     ! WB DSID
/com,*********** Create Contact "Bonded - Multiple To Surface Body" ***********
*set,tid,26
*set,cid,25
r,tid
r,cid
et,tid,170
et,cid,175
mat,25
real,25
type,25
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en,15487,2042
eblock,10,,,540
(15i9)
    15488       26       25       26        0     1590     1860     1661     1661
    15489       26       25       26        0     5398     5399     5262     5262
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-1
keyo,cid,10,0              ! adjust contact stiffness each NR iteration (from Program Controlled setting)
keyo,cid,12,5              ! bonded always
keyo,cid,18,1              ! small sliding turned on by application
keyo,cid,2,0               ! augmented Lagrange (from Program Controlled setting)
keyo,tid,5,2               ! Constrain both translation and rotation
keyo,cid,9,1               ! ignore initial gaps/penetration
keyo,cid,7,0               ! No Prediction
rmod,cid,3,10.      ! FKN
rmod,cid,5,0.       ! ICONT
rmod,cid,6,1.       ! PINB
rmod,cid,10,0.      ! CNOF
rmod,cid,12,0.      ! FKT
rmod,cid,36,176     ! WB DSID
/com,*********** Create Contact "Contact Region" ***********
*set,tid,28
*set,cid,27
r,tid
r,cid
et,tid,170
et,cid,174
eblock,10,,,10
(15i9)
    16028       28       28       28        0       28       18       17       27      217      213      214      242
    16029       28       28       28        0       29       19       18       28      220      216      217      245
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-1
eblock,10,,,10
(15i9)
    16038       27       27       27        0       28       18       17       27      217      213      214      242
    16039       27       27       27        0       29       19       18       28      220      216      217      245
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-1
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eblock,10,,,61
(15i9)
    16109       28       27       28        0     1676     1483     1554     1554
    16110       28       27       28        0     1678     5693     1676     1676
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-1
keyo,cid,8,2               ! auto create asymmetric contact (from Program Controlled setting)
keyo,cid,10,0              ! adjust contact stiffness each NR iteration (from Program Controlled setting)
keyo,cid,12,5              ! bonded always
keyo,cid,18,1              ! small sliding turned on by application
keyo,cid,2,0               ! augmented Lagrange (from Program Controlled setting)
keyo,cid,4,0               ! on Gauss point (from Program Controlled setting)
keyo,cid,9,1               ! ignore initial gaps/penetration
keyo,cid,7,0               ! No Prediction
rmod,tid,3,10.      ! FKN
rmod,tid,5,0.       ! ICONT
rmod,tid,6,-14.0545807622872  ! PINB
rmod,tid,10,0.      ! CNOF
rmod,tid,12,0.      ! FKT
rmod,tid,36,300     ! WB DSID
rmod,cid,3,10.      ! FKN
rmod,cid,5,0.       ! ICONT
rmod,cid,6,-14.0545807622872  ! PINB
rmod,cid,10,0.      ! CNOF
rmod,cid,12,0.      ! FKT
rmod,cid,36,300     ! WB DSID
/com,*********** Create Contact "Contact Region 2" ***********
*set,tid,30
*set,cid,29
r,tid
r,cid
et,tid,170
et,cid,174
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eblock,10,,,32
(15i9)
    16242       30       29       30        0     1678     1676     4186     4186
    16243       30       29       30        0     4181     1483     4182     4182
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-1
keyo,cid,8,2               ! auto create asymmetric contact (from Program Controlled setting)
keyo,cid,10,0              ! adjust contact stiffness each NR iteration (from Program Controlled setting)
keyo,cid,12,5              ! bonded always
keyo,cid,18,1              ! small sliding turned on by application
keyo,cid,2,0               ! augmented Lagrange (from Program Controlled setting)
keyo,cid,4,0               ! on Gauss point (from Program Controlled setting)
keyo,cid,9,1               ! ignore initial gaps/penetration
keyo,cid,7,0               ! No Prediction
rmod,tid,3,10.      ! FKN
rmod,tid,5,0.       ! ICONT
rmod,tid,6,-14.0545807622872  ! PINB
rmod,tid,10,0.      ! CNOF
rmod,tid,12,0.      ! FKT
rmod,tid,36,303     ! WB DSID
rmod,cid,3,10.      ! FKN
rmod,cid,5,0.       ! ICONT
rmod,cid,6,-14.0545807622872  ! PINB
rmod,cid,10,0.      ! CNOF
rmod,cid,12,0.      ! FKT
rmod,cid,36,303     ! WB DSID
/com,*********** Create Contact "Contact Region 3" ***********
*set,tid,32
*set,cid,31
r,tid
r,cid
et,tid,170
et,cid,174
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eblock,10,,,64
(15i9)
    16358       32       31       32        0     1676     1483     1554     1554
    16359       32       31       32        0     1678     5693     1676     1676
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-1
keyo,cid,8,2               ! auto create asymmetric contact (from Program Controlled setting)
keyo,cid,10,0              ! adjust contact stiffness each NR iteration (from Program Controlled setting)
keyo,cid,12,5              ! bonded always
keyo,cid,18,1              ! small sliding turned on by application
keyo,cid,2,0               ! augmented Lagrange (from Program Controlled setting)
keyo,cid,4,0               ! on Gauss point (from Program Controlled setting)
keyo,cid,9,1               ! ignore initial gaps/penetration
keyo,cid,7,0               ! No Prediction
rmod,tid,3,10.      ! FKN
rmod,tid,5,0.       ! ICONT
rmod,tid,6,-14.0545807622872  ! PINB
rmod,tid,10,0.      ! CNOF
rmod,tid,12,0.      ! FKT
rmod,tid,36,306     ! WB DSID
rmod,cid,3,10.      ! FKN
rmod,cid,5,0.       ! ICONT
rmod,cid,6,-14.0545807622872  ! PINB
rmod,cid,10,0.      ! CNOF
rmod,cid,12,0.      ! FKT
rmod,cid,36,306     ! WB DSID
/com,*********** Create Contact "Contact Region 4" ***********
*set,tid,34
*set,cid,33
r,tid
r,cid
et,tid,170
et,cid,174
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eblock,10,,,32
(15i9)
    16494       34       33       34        0     1676     1678     4186     4186
    16495       34       33       34        0     1483     4181     4182     4182
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-1
keyo,cid,8,2               ! auto create asymmetric contact (from Program Controlled setting)
keyo,cid,10,0              ! adjust contact stiffness each NR iteration (from Program Controlled setting)
keyo,cid,12,5              ! bonded always
keyo,cid,18,1              ! small sliding turned on by application
keyo,cid,2,0               ! augmented Lagrange (from Program Controlled setting)
keyo,cid,4,0               ! on Gauss point (from Program Controlled setting)
keyo,cid,9,1               ! ignore initial gaps/penetration
keyo,cid,7,0               ! No Prediction
rmod,tid,3,10.      ! FKN
rmod,tid,5,0.       ! ICONT
rmod,tid,6,-14.0545807622872  ! PINB
rmod,tid,10,0.      ! CNOF
rmod,tid,12,0.      ! FKT
rmod,tid,36,309     ! WB DSID
rmod,cid,3,10.      ! FKN
rmod,cid,5,0.       ! ICONT
rmod,cid,6,-14.0545807622872  ! PINB
rmod,cid,10,0.      ! CNOF
rmod,cid,12,0.      ! FKT
rmod,cid,36,309     ! WB DSID
/com,*********** Create Contact "Contact Region 5" ***********
*set,tid,36
*set,cid,35
r,tid
r,cid
et,tid,170
et,cid,174
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eblock,10,,,64
(15i9)
    16610       36       35       36        0     1860     1590     1661     1661
    16611       36       35       36        0     1860     5339     1591     1591
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-1
keyo,cid,8,2               ! auto create asymmetric contact (from Program Controlled setting)
keyo,cid,10,0              ! adjust contact stiffness each NR iteration (from Program Controlled setting)
keyo,cid,12,5              ! bonded always
keyo,cid,18,1              ! small sliding turned on by application
keyo,cid,2,0               ! augmented Lagrange (from Program Controlled setting)
keyo,cid,4,0               ! on Gauss point (from Program Controlled setting)
keyo,cid,9,1               ! ignore initial gaps/penetration
keyo,cid,7,0               ! No Prediction
rmod,tid,3,10.      ! FKN
rmod,tid,5,0.       ! ICONT
rmod,tid,6,-14.0545807622872  ! PINB
rmod,tid,10,0.      ! CNOF
rmod,tid,12,0.      ! FKT
rmod,tid,36,312     ! WB DSID
rmod,cid,3,10.      ! FKN
rmod,cid,5,0.       ! ICONT
rmod,cid,6,-14.0545807622872  ! PINB
rmod,cid,10,0.      ! CNOF
rmod,cid,12,0.      ! FKT
rmod,cid,36,312     ! WB DSID
/com,*********** Create Contact "Contact Region 6" ***********
*set,tid,38
*set,cid,37
r,tid
r,cid
et,tid,170
et,cid,174
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eblock,10,,,31
(15i9)
    16745       38       37       38        0     3902     1860     1590     1590
    16746       38       37       38        0     3635     3637     3908     3633
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-1
keyo,cid,8,2               ! auto create asymmetric contact (from Program Controlled setting)
keyo,cid,10,0              ! adjust contact stiffness each NR iteration (from Program Controlled setting)
keyo,cid,12,5              ! bonded always
keyo,cid,18,1              ! small sliding turned on by application
keyo,cid,2,0               ! augmented Lagrange (from Program Controlled setting)
keyo,cid,4,0               ! on Gauss point (from Program Controlled setting)
keyo,cid,9,1               ! ignore initial gaps/penetration
keyo,cid,7,0               ! No Prediction
rmod,tid,3,10.      ! FKN
rmod,tid,5,0.       ! ICONT
rmod,tid,6,-14.0545807622872  ! PINB
rmod,tid,10,0.      ! CNOF
rmod,tid,12,0.      ! FKT
rmod,tid,36,315     ! WB DSID
rmod,cid,3,10.      ! FKN
rmod,cid,5,0.       ! ICONT
rmod,cid,6,-14.0545807622872  ! PINB
rmod,cid,10,0.      ! CNOF
rmod,cid,12,0.      ! FKT
rmod,cid,36,315     ! WB DSID
/com,*********** Create Contact "Contact Region 7" ***********
*set,tid,40
*set,cid,39
r,tid
r,cid
et,tid,170
et,cid,174
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eblock,10,,,59
(15i9)
    16855       40       39       40        0     1860     1590     1661     1661
    16856       40       39       40        0     1860     5339     1591     1591
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-1
keyo,cid,8,2               ! auto create asymmetric contact (from Program Controlled setting)
keyo,cid,10,0              ! adjust contact stiffness each NR iteration (from Program Controlled setting)
keyo,cid,12,5              ! bonded always
keyo,cid,18,1              ! small sliding turned on by application
keyo,cid,2,0               ! augmented Lagrange (from Program Controlled setting)
keyo,cid,4,0               ! on Gauss point (from Program Controlled setting)
keyo,cid,9,1               ! ignore initial gaps/penetration
keyo,cid,7,0               ! No Prediction
rmod,tid,3,10.      ! FKN
rmod,tid,5,0.       ! ICONT
rmod,tid,6,-14.0545807622872  ! PINB
rmod,tid,10,0.      ! CNOF
rmod,tid,12,0.      ! FKT
rmod,tid,36,318     ! WB DSID
rmod,cid,3,10.      ! FKN
rmod,cid,5,0.       ! ICONT
rmod,cid,6,-14.0545807622872  ! PINB
rmod,cid,10,0.      ! CNOF
rmod,cid,12,0.      ! FKT
rmod,cid,36,318     ! WB DSID
/com,*********** Create Contact "Contact Region 8" ***********
*set,tid,42
*set,cid,41
r,tid
r,cid
et,tid,170
et,cid,174
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eblock,10,,,31
(15i9)
    16985       42       41       42        0     1860     3902     1590     1590
    16986       42       41       42        0     3637     3635     3633     3908
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-1
keyo,cid,8,2               ! auto create asymmetric contact (from Program Controlled setting)
keyo,cid,10,0              ! adjust contact stiffness each NR iteration (from Program Controlled setting)
keyo,cid,12,5              ! bonded always
keyo,cid,18,1              ! small sliding turned on by application
keyo,cid,2,0               ! augmented Lagrange (from Program Controlled setting)
keyo,cid,4,0               ! on Gauss point (from Program Controlled setting)
keyo,cid,9,1               ! ignore initial gaps/penetration
keyo,cid,7,0               ! No Prediction
rmod,tid,3,10.      ! FKN
rmod,tid,5,0.       ! ICONT
rmod,tid,6,-14.0545807622872  ! PINB
rmod,tid,10,0.      ! CNOF
rmod,tid,12,0.      ! FKT
rmod,tid,36,321     ! WB DSID
rmod,cid,3,10.      ! FKN
rmod,cid,5,0.       ! ICONT
rmod,cid,6,-14.0545807622872  ! PINB
rmod,cid,10,0.      ! CNOF
rmod,cid,12,0.      ! FKT
rmod,cid,36,321     ! WB DSID
/com,*********** Create Contact "Bonded - Surface Body To Surface Body" ***********
*set,tid,44
*set,cid,43
r,tid
r,cid
et,tid,170
et,cid,175
mat,43
real,43
type,43
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keyo,cid,10,0              ! adjust contact stiffness each NR iteration (from Program Controlled setting)
keyo,cid,12,5              ! bonded always
keyo,cid,18,1              ! small sliding turned on by application
keyo,cid,2,0               ! augmented Lagrange (from Program Controlled setting)
keyo,tid,5,2               ! Constrain both translation and rotation
keyo,cid,9,1               ! ignore initial gaps/penetration
keyo,cid,7,0               ! No Prediction
rmod,cid,3,10.      ! FKN
rmod,cid,5,0.       ! ICONT
rmod,cid,6,1.       ! PINB
rmod,cid,10,0.      ! CNOF
rmod,cid,12,0.      ! FKT
rmod,cid,36,333     ! WB DSID
/com,*********** Create Contact "Bonded - Surface Body To Surface Body" ***********
*set,tid,46
*set,cid,45
r,tid
r,cid
et,tid,170
et,cid,175
mat,45
real,45
type,45
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keyo,cid,10,0              ! adjust contact stiffness each NR iteration (from Program Controlled setting)
keyo,cid,12,5              ! bonded always
keyo,cid,18,1              ! small sliding turned on by application
keyo,cid,2,0               ! augmented Lagrange (from Program Controlled setting)
keyo,tid,5,2               ! Constrain both translation and rotation
keyo,cid,9,1               ! ignore initial gaps/penetration
keyo,cid,7,0               ! No Prediction
rmod,cid,3,10.      ! FKN
rmod,cid,5,0.       ! ICONT
rmod,cid,6,1.       ! PINB
rmod,cid,10,0.      ! CNOF
rmod,cid,12,0.      ! FKT
rmod,cid,36,336     ! WB DSID
/com,*********** Create Contact "Bonded - Surface Body To Surface Body" ***********
*set,tid,48
*set,cid,47
r,tid
r,cid
et,tid,170
et,cid,175
mat,47
real,47
type,47
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keyo,cid,10,0              ! adjust contact stiffness each NR iteration (from Program Controlled setting)
keyo,cid,12,5              ! bonded always
keyo,cid,18,1              ! small sliding turned on by application
keyo,cid,2,0               ! augmented Lagrange (from Program Controlled setting)
keyo,tid,5,2               ! Constrain both translation and rotation
keyo,cid,9,1               ! ignore initial gaps/penetration
keyo,cid,7,0               ! No Prediction
rmod,cid,3,10.      ! FKN
rmod,cid,5,0.       ! ICONT
rmod,cid,6,1.       ! PINB
rmod,cid,10,0.      ! CNOF
rmod,cid,12,0.      ! FKT
rmod,cid,36,339     ! WB DSID
/com,*********** Create Contact "Bonded - Surface Body To Surface Body" ***********
*set,tid,50
*set,cid,49
r,tid
r,cid
et,tid,170
et,cid,175
mat,49
real,49
type,49
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keyo,cid,10,0              ! adjust contact stiffness each NR iteration (from Program Controlled setting)
keyo,cid,12,5              ! bonded always
keyo,cid,18,1              ! small sliding turned on by application
keyo,cid,2,0               ! augmented Lagrange (from Program Controlled setting)
keyo,tid,5,2               ! Constrain both translation and rotation
keyo,cid,9,1               ! ignore initial gaps/penetration
keyo,cid,7,0               ! No Prediction
rmod,cid,3,10.      ! FKN
rmod,cid,5,0.       ! ICONT
rmod,cid,6,1.       ! PINB
rmod,cid,10,0.      ! CNOF
rmod,cid,12,0.      ! FKT
rmod,cid,36,342     ! WB DSID
nsel,all
esel,all
/com,*********** Fixed Supports ***********
CMBLOCK,_FIXEDSU,NODE,       36
(8i10)
       563       659       660       661       662       663       784       880
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cmsel,s,_FIXEDSU
d,all,all
nsel,all
/com,*********** Define Force Using Surface Effect Elements ***********
local,12,0,0.,0.,0.,0.,0.,0.
csys,0
et,51,156
keyop,51,5,1        !  No orientation node
eblock,10,,,140
(15i9)
    22518       51       51       51       12     1591     1590
    22519       51       51       51       12     1592     1591
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-1
esel,s,type,,51
keyop,51,2,1                ! Apply load in local coordinate system
keyop,51,7,1                ! Use original area so load is constant in large deformation
esel,all
/com,*********** Define Force Using Surface Effect Elements ***********
local,13,0,0.,0.,0.,0.,0.,0.
csys,0
et,52,156
keyop,52,5,1        !  No orientation node
eblock,10,,,138
(15i9)
    22658       52       52       52       13     2065     2064
    22659       52       52       52       13     2066     2065
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-1
esel,s,type,,52
keyop,52,2,1                ! Apply load in local coordinate system
keyop,52,7,1                ! Use original area so load is constant in large deformation
esel,all
fini
/com,****************************************************************************
/com,*************************    SOLUTION       ********************************
/com,****************************************************************************
/solu
antype,0                   ! static analysis
_thickRatio=  0     ! Ratio of thick parts in the model
eqsl,sparse,,,,,1
cntr,print,1               ! print out contact info and also make no initial contact an error
nldiag,cont,iter           ! print out contact info each equilibrium iteration
rescontrol,,none                 ! Do not keep any restart files
/com,****************************************************
/com,******************* SOLVE FOR LS 1 OF 1 ****************
esel,s,type,,51
nsle
sfe,all,1,pres,1,16.2033639162948
sfe,all,2,pres,1,0.
sfe,all,3,pres,1,16.2033639162948
esel,s,type,,52
nsle
sfe,all,1,pres,1,-16.3770794824399
sfe,all,2,pres,1,0.
sfe,all,3,pres,1,-16.3770794824399
nsel,all
esel,all
nsub,1,1,1
time,1.
outres,erase
outres,all,none
outres,nsol,all,
outres,rsol,all
outres,eangl,all
outres,etmp,all
outres,veng,all
outres,strs,all,
outres,epel,all,
outres,eppl,all,
outres,cont,all,
! *********** WB SOLVE COMMAND ***********
! check interactive state
*get,ANSINTER_,active,,int
*if,ANSINTER_,ne,0,then
/eof
*endif
solve
/com *************** Write FE CONNECTORS *********
CEWRITE,file,ce,,INTE
/com,****************************************************
/com,*************** FINISHED SOLVE FOR LS 1 *************
/post1
fini
